# 1. Западная Сибирь
#
# Западная Сибирь дает приблизительно две трети всей российской добычи нефти.
# Данные  о годовой добыче нефти в Западной Сибири за 1964-1990 гг. из личного архива Василия Дмитриевичя Наливкина, табл. ΔW, тыс. тонн
# Они  дополнены данными Госкомстата.
# Данные о добыче за 1993-1994 годы,  отсутствуют. За эти годы в таблицу включены условные оценки  для того, чтобы возможно было рассчитать накопленную добычу.
# В табл. Disk - данные EIA о накопленных открытиях, млрд баррелей.
# [component: outputs ΔW]
# [component: outputs Disk]
WRITECSV(disk, "west_siberia_disk.csv")
WRITECSV(ΔW, "west_siberia_deltaW.csv")
# Данные о текущих разведанных запасах промышленных категорий А+В+С1 за 1960-1990 гг. по состоянию на 31 декабря  текущего года  собраны чл-корр АН СССР, Наливкиным Василием Дмитриевичем.
# Текущие разведанные запасы нефти Западной Сибири, Reserves млрд. тонн - первый столбец (№ 1), столбец с номером два - данные  BP - в  1980-1997 гг. доказанные запасы СССР категорий А+В, в млрд баррелей на конец года,
# в 1998-2011 - доказанные запасы РФ на конец года в млрд баррелей.
# В столбце с номером один - до 1990 г. - данные Наливкина, после - пересчет приростов  запасов по результататм ГГР в России с коэффициентом 0,75 для Западной сибири из  книги Коржубаев А.Г., Эдер .В. Экономика...
# Далее расчет начальных разв. запасов по приростам при известных уровнях в 2001-2003 гг.
# Reserves млрд. тонн
# [component: outputs Reserves]
# 2. США
# Текущие доказанные заапсы нефти в США в млрд. баррелей на конец года - данные журналов World Oil и Oil and Gas Journal, EIA .
# [component: outputs Z]
# [component: outputs PRODUSA]
# 3. Волго-Уральский район
# Добыча в тыс. тонн, запасы - на конец года в тыс. тонн - Reserves и  reserves - разные источники данных и разные временные интервалы
# [component: outputs VolgoUral]
# [component: outputs reserves]
# [component: outputs Reserves]
# 4. Северный Кавказ
# Просуммированы данные по Адыгее, Дагестану, Ингушетии, Чечне, Кабардино-Балкарии,Калмыкии, Осетии,
# Добыча в тыс. тонн, запасы - на конец года в тыс. тонн
# [component: outputs NorthKavkaz]
# [component: outputs Reserves]
# 5. Саудовская Аравия
# Добыча нефти в Саудовской Аравии в 1936-2006 гг., тыс. баррелей в год (столбец №1 таблицы Prod). ежедневные данные, столбец №2, таблица Prod,  в тыс. барреллей в день;
# обзор ЦРУ столбец №3, таблица Prod, ежедневная добыча в тыс. баррелей в день;
# таблица Reserves  - запасы в млрд. баррелей, не указано на начало или конец года, видимо, все-таки, начало года). В 1958, 1959, 1964, 1984, 2005, 2006 гг. данные о запасах отсутствовали, они взяты произвольно.  Данные  по  добыче по пересекающимся интервалам незначительно разнятся в разных источниках приблизительно на 10%, по запасам практически совпадают.
# Запасы.  Reserves - текущие доказанные запасы в млрд. баррелей
# [component: outputs Prod]
# [component: outputs Reserves]
